// SBML level 2 version 4

model GutInflammation_BaseModel_v4_Best()
  // GutInflammation_BaseModel_v4_Best

  // Compartments:
  compartment Gut = 933 MWBUILTINPREFIX_milli_MWBUILTINUNIT_liter;
  compartment Blood = 4500 MWBUILTINPREFIX_milli_MWBUILTINUNIT_liter;
  compartment Lymph_Nodes = 1 MWBUILTINPREFIX_milli_MWBUILTINUNIT_liter;
  compartment Liver = 1660 MWBUILTINPREFIX_milli_MWBUILTINUNIT_liter;
  compartment Peripheral = 1 MWBUILTINPREFIX_milli_MWBUILTINUNIT_liter;

  // Species:
  substanceOnly species Th0 in Gut = 0;  // substance in MWBUILTINUNIT_molecule
  substanceOnly species Th1 in Gut = 0;  // substance in MWBUILTINUNIT_molecule
  substanceOnly species Th2 in Gut = 0;  // substance in MWBUILTINUNIT_molecule
  substanceOnly species Th17 in Gut = 0;  // substance in MWBUILTINUNIT_molecule
  substanceOnly species Treg in Gut = 0;  // substance in MWBUILTINUNIT_molecule
  substanceOnly species IL4 in Gut = 0;  // substance in MWBUILTINPREFIX_pico_MWBUILTINUNIT_mole
  substanceOnly species IL10 in Gut = 0;  // substance in MWBUILTINPREFIX_pico_MWBUILTINUNIT_mole
  substanceOnly species TGFb_Gut in Gut = 0;  // substance in MWBUILTINPREFIX_pico_MWBUILTINUNIT_mole
  substanceOnly species M1 in Gut = 0;  // substance in MWBUILTINUNIT_molecule
  substanceOnly species eDC in Gut = 0;  // substance in MWBUILTINUNIT_molecule
  substanceOnly species IL12_Gut in Gut = 0;  // substance in MWBUILTINPREFIX_pico_MWBUILTINUNIT_mole
  substanceOnly species IFNg in Gut = 0;  // substance in MWBUILTINPREFIX_pico_MWBUILTINUNIT_mole
  substanceOnly species TL1A in Gut = 0;  // substance in MWBUILTINPREFIX_pico_MWBUILTINUNIT_mole
  substanceOnly species IL2 in Gut = 0;  // substance in MWBUILTINPREFIX_pico_MWBUILTINUNIT_mole
  substanceOnly species IL21 in Gut = 0;  // substance in MWBUILTINPREFIX_pico_MWBUILTINUNIT_mole
  substanceOnly species IL23 in Gut = 0;  // substance in MWBUILTINPREFIX_pico_MWBUILTINUNIT_mole
  substanceOnly species IL6_Gut in Gut = 0;  // substance in MWBUILTINPREFIX_pico_MWBUILTINUNIT_mole
  substanceOnly species IL17_Gut in Gut = 0;  // substance in MWBUILTINPREFIX_pico_MWBUILTINUNIT_mole
  substanceOnly species tDC in Gut = 0;  // substance in MWBUILTINUNIT_molecule
  substanceOnly species M2 in Gut = 0;  // substance in MWBUILTINUNIT_molecule
  substanceOnly species M0 in Gut = 0;  // substance in MWBUILTINUNIT_molecule
  substanceOnly species GMCSF in Gut = 0;  // substance in MWBUILTINPREFIX_pico_MWBUILTINUNIT_mole
  substanceOnly species TNFa_Gut in Gut = 0;  // substance in MWBUILTINPREFIX_pico_MWBUILTINUNIT_mole
  substanceOnly species IL13 in Gut = 0;  // substance in MWBUILTINPREFIX_pico_MWBUILTINUNIT_mole
  substanceOnly species iDC in Gut = 0;  // substance in MWBUILTINUNIT_molecule
  substanceOnly species NK1 in Gut = 0;  // substance in MWBUILTINUNIT_molecule
  substanceOnly species NKT in Gut = 0;  // substance in MWBUILTINUNIT_molecule
  substanceOnly species IL5 in Gut = 0;  // substance in MWBUILTINPREFIX_pico_MWBUILTINUNIT_mole
  substanceOnly species IL15 in Gut = 0;  // substance in MWBUILTINPREFIX_pico_MWBUILTINUNIT_mole
  substanceOnly species IL18 in Gut = 0;  // substance in MWBUILTINPREFIX_pico_MWBUILTINUNIT_mole
  substanceOnly species NK in Gut = 0;  // substance in MWBUILTINUNIT_molecule
  substanceOnly species NK2 in Gut = 0;  // substance in MWBUILTINUNIT_molecule
  substanceOnly species IL22 in Gut = 0;  // substance in MWBUILTINPREFIX_pico_MWBUILTINUNIT_mole
  substanceOnly species Neu_Gut in Gut = 0;  // substance in MWBUILTINUNIT_molecule
  substanceOnly species IL8_Gut in Gut = 0;  // substance in MWBUILTINPREFIX_pico_MWBUILTINUNIT_mole
  substanceOnly species $Calprotectin in Gut;  // substance in MWBUILTINPREFIX_milli_MWBUILTINUNIT_gram
  substanceOnly species Neu_act in Gut = 0;  // substance in MWBUILTINUNIT_molecule
  substanceOnly species Neu_Total in Gut;  // substance in MWBUILTINUNIT_molecule
  substanceOnly species IL6_Blood in Blood = 0;  // substance in MWBUILTINPREFIX_pico_MWBUILTINUNIT_mole
  substanceOnly species CRP_Blood in Blood = 0;  // substance in MWBUILTINPREFIX_pico_MWBUILTINUNIT_mole
  substanceOnly species Neu_Blood in Blood = 0;  // substance in MWBUILTINUNIT_molecule
  substanceOnly species IL8_Blood in Blood = 0;  // substance in MWBUILTINPREFIX_pico_MWBUILTINUNIT_mole
  substanceOnly species IL17_Blood in Blood = 0;  // substance in MWBUILTINPREFIX_pico_MWBUILTINUNIT_mole
  substanceOnly species IL12_Blood in Blood = 0;  // substance in MWBUILTINPREFIX_pico_MWBUILTINUNIT_mole
  substanceOnly species TGFb_Blood in Blood = 0;  // substance in MWBUILTINPREFIX_pico_MWBUILTINUNIT_mole
  substanceOnly species TNFa_Blood in Blood = 0;  // substance in MWBUILTINPREFIX_pico_MWBUILTINUNIT_mole
  substanceOnly species IL6_Liver in Liver = 0;  // substance in MWBUILTINPREFIX_pico_MWBUILTINUNIT_mole
  substanceOnly species $CRP_Liver in Liver;  // substance in MWBUILTINPREFIX_pico_MWBUILTINUNIT_mole
  substanceOnly species CRPExtracellular in Liver = 0;  // substance in MWBUILTINPREFIX_pico_MWBUILTINUNIT_mole

  // Parameters:
  k1_1 = 0.0353 dimensionless;
  k2_1 = 0.062 dimensionless;
  k3_1 = 0.0011 dimensionless;
  k4_1 = 0.000249 MWDERIVEDUNIT_picomole__milliliter;
  k5_1 = 0.0154 MWDERIVEDUNIT_picomole__milliliter;
  k6_1 = 0.227 MWDERIVEDUNIT_picomole__milliliter;
  kbasal_1 = 0.123 dimensionless;
  vf_1 = 0.222 MWDERIVEDUNIT_1__day;
  k1_2 = 0.0734 dimensionless;
  k2_2 = 0.0445 dimensionless;
  k3_2 = 0.005373 dimensionless;
  k4_2 = 0.0001169 MWDERIVEDUNIT_picomole__milliliter;
  kbasal_2 = 0.0212 dimensionless;
  vf_2 = 0.217 MWDERIVEDUNIT_1__day;
  k1_3 = 0.0085 dimensionless;
  k2_3 = 0.0086 dimensionless;
  k3_3 = 0.00885 dimensionless;
  k4_3 = 0.0007 MWDERIVEDUNIT_picomole__milliliter;
  k5_3 = 0.316653 MWDERIVEDUNIT_picomole__milliliter;
  k6_3 = 0.342739 MWDERIVEDUNIT_picomole__milliliter;
  k7_3 = 0.000695 MWDERIVEDUNIT_picomole__milliliter;
  k8_3 = 0.0373 MWDERIVEDUNIT_picomole__milliliter;
  kbasal_3 = 0.016 dimensionless;
  vf_3 = 0.173 MWDERIVEDUNIT_1__day;
  k1_4 = 0.123 dimensionless;
  k2_4 = 0.107 dimensionless;
  k3_4 = 0.113 dimensionless;
  k4_4 = 2.97e-5 MWDERIVEDUNIT_picomole__milliliter;
  k5_4 = 0.016 MWDERIVEDUNIT_picomole__milliliter;
  k6_4 = 45603 MWDERIVEDUNIT_molecule__milliliter;
  kbasal_4 = 0.07 dimensionless;
  vf_4 = 0.2 MWDERIVEDUNIT_1__day;
  k1_5 = 12365 MWDERIVEDUNIT_molecule__milliliter;
  kbasal_Th0 = 1.21 dimensionless;
  vf_5 = 0.56 MWDERIVEDUNIT_1__milliliter__day;
  kdeg_Th0 = 0.4711 MWDERIVEDUNIT_1__day;
  kdeg_Th1 = 0.315 MWDERIVEDUNIT_1__day;
  kdeg_Th2 = 0.2695 MWDERIVEDUNIT_1__day;
  kdeg_Th17 = 0.5187 MWDERIVEDUNIT_1__day;
  kdeg_Treg = 0.355 MWDERIVEDUNIT_1__day;
  k1_11 = 82697 MWDERIVEDUNIT_molecule__milliliter;
  k2_11 = 129996 MWDERIVEDUNIT_molecule__milliliter;
  k3_11 = 84770 MWDERIVEDUNIT_molecule__milliliter;
  kbasal_11 = 0.1 dimensionless;
  vf_11 = 0.11 MWDERIVEDUNIT_1__day;
  k2_12 = 120674 MWDERIVEDUNIT_molecule__milliliter;
  k3_12 = 107612 MWDERIVEDUNIT_molecule__milliliter;
  k4_12 = 103804 MWDERIVEDUNIT_molecule__milliliter;
  kbasal_12 = 0.1 dimensionless;
  vf_12 = 0.08 MWDERIVEDUNIT_1__day;
  k1_12 = 112162 MWDERIVEDUNIT_molecule__milliliter;
  k1_17 = 0.325 MWDERIVEDUNIT_1__day;
  k2_17 = 0.325 MWDERIVEDUNIT_1__day;
  kbasal_M0 = 2500 MWDERIVEDUNIT_molecule__milliliter__day;
  k1_18 = 99088 MWDERIVEDUNIT_molecule__milliliter;
  k2_18 = 511349 MWDERIVEDUNIT_molecule__milliliter;
  kbasal_18 = 0.01 dimensionless;
  vf_18 = 0.01 MWDERIVEDUNIT_1__day;
  k3_18 = 154009 MWDERIVEDUNIT_molecule__milliliter;
  k4_18 = 0.05292 MWDERIVEDUNIT_picomole__milliliter;
  k5_18 = 0.02646 MWDERIVEDUNIT_picomole__milliliter;
  k6_18 = 0.00938 MWDERIVEDUNIT_picomole__milliliter;
  k1_19 = 159088 MWDERIVEDUNIT_molecule__milliliter;
  k2_19 = 231319 MWDERIVEDUNIT_molecule__milliliter;
  k3_19 = 0.00245 MWDERIVEDUNIT_picomole__milliliter;
  k4_19 = 0.002549 MWDERIVEDUNIT_picomole__milliliter;
  k5_19 = 0.0017 MWDERIVEDUNIT_picomole__milliliter;
  k6_19 = 0.21 MWDERIVEDUNIT_picomole__milliliter;
  kbasal_19 = 0.007 dimensionless;
  vf_19 = 0.009 MWDERIVEDUNIT_1__day;
  k1_20 = 109023 MWDERIVEDUNIT_molecule__milliliter;
  k2_20 = 69961 MWDERIVEDUNIT_molecule__milliliter;
  k3_20 = 142177 MWDERIVEDUNIT_molecule__milliliter;
  kbasal_20 = 0.44 dimensionless;
  vf_20 = 0.323 MWDERIVEDUNIT_1__day;
  k1_21 = 98653 MWDERIVEDUNIT_molecule__milliliter;
  k2_21 = 132039 MWDERIVEDUNIT_molecule__milliliter;
  k3_21 = 129288 MWDERIVEDUNIT_molecule__milliliter;
  k4_21 = 122968 MWDERIVEDUNIT_molecule__milliliter;
  kbasal_21 = 1.21 dimensionless;
  vf_21 = 0.1 MWDERIVEDUNIT_1__day;
  k1_25 = 24124 MWDERIVEDUNIT_molecule__milliliter;
  kbasal_iDC = 1.4 dimensionless;
  vf_25 = 1 MWDERIVEDUNIT_1__milliliter__day;
  k2_25 = 32174 MWDERIVEDUNIT_molecule__milliliter;
  k1_26 = 0.000431 MWDERIVEDUNIT_picomole__milliliter;
  kbasal_26 = 0.0123 dimensionless;
  k1_27 = 0.00153 MWDERIVEDUNIT_picomole__milliliter;
  k2_27 = 0.0528 MWDERIVEDUNIT_picomole__milliliter;
  k3_27 = 0.0176 MWDERIVEDUNIT_picomole__milliliter;
  k4_27 = 0.0023 MWDERIVEDUNIT_picomole__milliliter;
  kbasal_27 = 0.01 dimensionless;
  vf_27 = 0.023 MWDERIVEDUNIT_1__day;
  vf_26 = 0.066 MWDERIVEDUNIT_1__day;
  k2_31 = 6.18e-9 MWDERIVEDUNIT_picomole__molecule__day;
  kbasal_IL12 = 1.71e-5 MWDERIVEDUNIT_picomole__milliliter__day;
  k1_33 = 4.34e-8 MWDERIVEDUNIT_picomole__molecule__day;
  k2_33 = 1.23e-7 MWDERIVEDUNIT_picomole__molecule__day;
  k3_33 = 4.88e-7 MWDERIVEDUNIT_picomole__molecule__day;
  kbasal_IFNg = 0.000149965964 MWDERIVEDUNIT_picomole__milliliter__day;
  k1_31 = 4.98e-9 MWDERIVEDUNIT_picomole__molecule__day;
  k1_35 = 5.6e-8 MWDERIVEDUNIT_picomole__molecule__day;
  k2_35 = 2e-9 MWDERIVEDUNIT_picomole__molecule__day;
  kbasal_IL2 = 3.68e-5 MWDERIVEDUNIT_picomole__milliliter__day;
  fi12 = 2.49 dimensionless;
  k3_31 = 3.36e-11 MWDERIVEDUNIT_picomole__molecule__day;
  w_17 = 0.13 dimensionless;
  k2_5 = 18900 MWDERIVEDUNIT_molecule__milliliter;
  k1_63 = 12045 MWDERIVEDUNIT_molecule__milliliter;
  vf_63 = 0.49 MWDERIVEDUNIT_1__day;
  k1_37 = 1.97e-9 MWDERIVEDUNIT_picomole__molecule__day;
  k2_37 = 4.46e-9 MWDERIVEDUNIT_picomole__molecule__day;
  k3_37 = 5.17e-10 MWDERIVEDUNIT_picomole__molecule__day;
  k4_37 = 3.87e-11 MWDERIVEDUNIT_picomole__molecule__day;
  kbasal_IL6 = 0.002 MWDERIVEDUNIT_picomole__milliliter__day;
  k1_39 = 6.5e-8 MWDERIVEDUNIT_picomole__molecule__day;
  k2_39 = 3.1e-7 MWDERIVEDUNIT_picomole__molecule__day;
  k3_39 = 6.85e-11 MWDERIVEDUNIT_picomole__molecule__day;
  kbasal_IL23 = 2.26e-5 MWDERIVEDUNIT_picomole__milliliter__day;
  k1_41 = 5e-7 MWDERIVEDUNIT_picomole__molecule__day;
  k2_41 = 1.1e-7 MWDERIVEDUNIT_picomole__molecule__day;
  kbasal_IL21 = 5.51e-5 MWDERIVEDUNIT_picomole__milliliter__day;
  k1_43 = 7.42e-7 MWDERIVEDUNIT_picomole__molecule__day;
  k2_43 = 7.15e-7 MWDERIVEDUNIT_picomole__molecule__day;
  k3_43 = 2.24e-7 MWDERIVEDUNIT_picomole__molecule__day;
  k4_43 = 4.77e-7 MWDERIVEDUNIT_picomole__molecule__day;
  kbasal_TGFb = 0.00381 MWDERIVEDUNIT_picomole__milliliter__day;
  k1_45 = 1.91e-9 MWDERIVEDUNIT_picomole__molecule__day;
  k2_45 = 4e-9 MWDERIVEDUNIT_picomole__molecule__day;
  kbasal_IL10 = 5.15e-5 MWDERIVEDUNIT_picomole__milliliter__day;
  k1_47 = 5.62e-7 MWDERIVEDUNIT_picomole__molecule__day;
  k2_47 = 4.62e-7 MWDERIVEDUNIT_picomole__molecule__day;
  kbasal_TL1A = 0.047 MWDERIVEDUNIT_picomole__milliliter__day;
  k1_49 = 4.79e-9 MWDERIVEDUNIT_picomole__molecule__day;
  k2_49 = 4.61e-9 MWDERIVEDUNIT_picomole__molecule__day;
  kbasal_IL13 = 7.57e-5 MWDERIVEDUNIT_picomole__milliliter__day;
  k1_51 = 1.05e-7 MWDERIVEDUNIT_picomole__molecule__day;
  k2_51 = 3.45e-9 MWDERIVEDUNIT_picomole__molecule__day;
  kbasal_IL17 = 9.21e-5 MWDERIVEDUNIT_picomole__milliliter__day;
  k1_53 = 6.22e-9 MWDERIVEDUNIT_picomole__molecule__day;
  k2_53 = 6.6e-10 MWDERIVEDUNIT_picomole__molecule__day;
  kbasal_IL5 = 2.04e-5 MWDERIVEDUNIT_picomole__milliliter__day;
  k1_55 = 1.07e-8 MWDERIVEDUNIT_picomole__molecule__day;
  k2_55 = 1.76e-9 MWDERIVEDUNIT_picomole__molecule__day;
  kbasal_IL4 = 3.22e-5 MWDERIVEDUNIT_picomole__milliliter__day;
  k1_57 = 1.28e-8 MWDERIVEDUNIT_picomole__molecule__day;
  kbasal_IL15 = 3.48e-5 MWDERIVEDUNIT_picomole__milliliter__day;
  k3_55 = 9.8e-11 MWDERIVEDUNIT_picomole__molecule__day;
  k3_45 = 3.72e-9 MWDERIVEDUNIT_picomole__molecule__day;
  k4_45 = 2.33e-9 MWDERIVEDUNIT_picomole__molecule__day;
  k4_20 = 0.005536 MWDERIVEDUNIT_picomole__milliliter;
  c72 = 0.002084 MWDERIVEDUNIT_picomole__milliliter;
  ci72 = 0.0477 dimensionless;
  k1_68 = 1.729 dimensionless;
  k2_68 = 1.63e-5 MWDERIVEDUNIT_picomole__milliliter;
  kbasal_68 = 0.1 dimensionless;
  vf_68 = 0.1 MWDERIVEDUNIT_1__day;
  k1_69 = 5.88e-5 MWDERIVEDUNIT_picomole__milliliter;
  kbasal_69 = 0.1 dimensionless;
  vf_69 = 0.1 MWDERIVEDUNIT_1__day;
  k1_70 = 0.000346 MWDERIVEDUNIT_picomole__milliliter;
  kbasal_70 = 0.1 dimensionless;
  vf_70 = 0.1 MWDERIVEDUNIT_1__day;
  kbasal_NK = 10250 MWDERIVEDUNIT_molecule__milliliter__day;
  vf_72 = 0.0014 MWDERIVEDUNIT_1__day;
  k1_72 = 0.000385 MWDERIVEDUNIT_picomole__milliliter;
  kbasal_72 = 0.5 dimensionless;
  k1_73 = 0.0005 MWDERIVEDUNIT_picomole__milliliter;
  kbasal_73 = 0.3 dimensionless;
  vf_73 = 0.0008 MWDERIVEDUNIT_1__day;
  kdeg_IL22 = 2.45 MWDERIVEDUNIT_1__day;
  k1_74 = 2.03e-6;
  kbasal_IL22 = 5.83e-5 MWDERIVEDUNIT_picomole__milliliter__day;
  k1_76 = 0.000495 MWDERIVEDUNIT_picomole__milliliter;
  k2_76 = 0.001435 MWDERIVEDUNIT_picomole__milliliter;
  k3_76 = 11015 MWDERIVEDUNIT_molecule__milliliter;
  kbasal_NKT = 0.763 dimensionless;
  vf_76 = 0.962 MWDERIVEDUNIT_1__milliliter__day;
  k2_64 = 134103 MWDERIVEDUNIT_molecule__milliliter;
  vf_64 = 0.001 MWDERIVEDUNIT_1__day;
  k2_65 = 10063 MWDERIVEDUNIT_molecule__milliliter;
  vf_65 = 0.000863 MWDERIVEDUNIT_1__day;
  vf_66 = 0.000948 MWDERIVEDUNIT_1__day;
  k2_67 = 73114 MWDERIVEDUNIT_molecule__milliliter;
  k3_67 = 0.00166 MWDERIVEDUNIT_picomole__milliliter;
  vf_67 = 0.000707 MWDERIVEDUNIT_1__day;
  kdeg_eDC = 0.025 MWDERIVEDUNIT_1__day;
  k1_67 = 0.00205 MWDERIVEDUNIT_picomole__milliliter;
  kdeg_TNFa = 3.16 MWDERIVEDUNIT_1__day;
  kdeg_TL1A = 3.61 MWDERIVEDUNIT_1__day;
  k1_65 = 6.35e-5 MWDERIVEDUNIT_picomole__milliliter;
  k1_66 = 6.08e-5 MWDERIVEDUNIT_picomole__milliliter;
  k1_64 = 6.08e-5 MWDERIVEDUNIT_picomole__milliliter;
  kdeg_TGFb = 1.9 MWDERIVEDUNIT_1__day;
  kdeg_tDC = 0.0118 MWDERIVEDUNIT_1__day;
  kbasal_Treg = 0.125 MWDERIVEDUNIT_molecule__milliliter__day;
  kbasal_Th2 = 0.09 MWDERIVEDUNIT_molecule__milliliter__day;
  kbasal_Th17 = 0.128 MWDERIVEDUNIT_molecule__milliliter__day;
  kbasal_Th1 = 0.1 MWDERIVEDUNIT_molecule__milliliter__day;
  kdeg_NKT = 0.0588 MWDERIVEDUNIT_1__day;
  kdeg_NK2 = 0.0674 MWDERIVEDUNIT_1__day;
  kdeg_NK1 = 0.0342 MWDERIVEDUNIT_1__day;
  kdeg_NK = 0.051774 MWDERIVEDUNIT_1__day;
  kdeg_GutNeu has MWDERIVEDUNIT_1__day;
  kdeg_M2 = 0.067 MWDERIVEDUNIT_1__day;
  kdeg_M1 = 0.075 MWDERIVEDUNIT_1__day;
  kdeg_M0 = 0.044 MWDERIVEDUNIT_1__day;
  kdeg_IL6 = 35 MWDERIVEDUNIT_1__day;
  kdeg_IL5 = 3.003 MWDERIVEDUNIT_1__day;
  kdeg_IL4 = 3.95 MWDERIVEDUNIT_1__day;
  kdeg_IL23 = 2.17 MWDERIVEDUNIT_1__day;
  kdeg_IL21 = 1.913 MWDERIVEDUNIT_1__day;
  kdeg_IL2 = 1.89 MWDERIVEDUNIT_1__day;
  kdeg_IL18 = 1.98 MWDERIVEDUNIT_1__day;
  kdeg_IL17 = 2.11 MWDERIVEDUNIT_1__day;
  kdeg_IL15 = 2.5 MWDERIVEDUNIT_1__day;
  kdeg_IL13 = 2.73 MWDERIVEDUNIT_1__day;
  kdeg_IL12 = 1.22 MWDERIVEDUNIT_1__day;
  kdeg_IL10 = 3.59 MWDERIVEDUNIT_1__day;
  kdeg_IFNg = 4.26 MWDERIVEDUNIT_1__day;
  kbasal_IL18 = 6.13e-5 MWDERIVEDUNIT_picomole__milliliter__day;
  kbasal_TNFa = 0.0028 MWDERIVEDUNIT_picomole__milliliter__day;
  k1_61 = 3.1e-7 MWDERIVEDUNIT_picomole__molecule__day;
  k2_61 = 5.64e-8 MWDERIVEDUNIT_picomole__molecule__day;
  k3_61 = 4.12e-8 MWDERIVEDUNIT_picomole__molecule__day;
  k1_59 = 1.4e-6 MWDERIVEDUNIT_picomole__molecule__day;
  k2_59 = 1.63e-6 MWDERIVEDUNIT_picomole__molecule__day;
  kbasal_IL8 = 0.00086 MWDERIVEDUNIT_picomole__milliliter__day;
  kdeg_IL8 = 3.07 MWDERIVEDUNIT_1__day;
  k1_83 = 1.07e-9 MWDERIVEDUNIT_picomole__molecule__day;
  k2_83 = 4.29e-10 MWDERIVEDUNIT_picomole__molecule__day;
  k1_85 = 9.77e-10 MWDERIVEDUNIT_picomole__molecule__day;
  k2_85 = 1.15e-9 MWDERIVEDUNIT_picomole__molecule__day;
  k3_85 = 1.27e-8 MWDERIVEDUNIT_picomole__molecule__day;
  k4_85 = 1.09e-8 MWDERIVEDUNIT_picomole__molecule__day;
  k5_85 = 1.1e-9 MWDERIVEDUNIT_picomole__molecule__day;
  kbasal_GMCSF = 7.949e-5 MWDERIVEDUNIT_picomole__milliliter__day;
  kdeg_GMCSF = 1.24 MWDERIVEDUNIT_1__day;
  Th0_blood_constant = 121802 MWBUILTINUNIT_molecule;
  iDC_blood_constant = 310.5 MWBUILTINUNIT_molecule;
  NKT_constant = 1886 MWBUILTINUNIT_molecule;
  k5_45 = 3.16e-8 MWDERIVEDUNIT_picomole__molecule__day;
  k4_55 = 6.49e-11 MWDERIVEDUNIT_picomole__molecule__day;
  k3_k5 = 4.17e-10 MWDERIVEDUNIT_picomole__molecule__day;
  k3_49 = 1.47e-8 MWDERIVEDUNIT_picomole__molecule__day;
  KmProtSyn = 0.0055 MWDERIVEDUNIT_picomole__milliliter;
  VmProtSynth = 163131.9 MWDERIVEDUNIT_picomole__milliliter;
  KmCalprotectin = 7614675.8 MWDERIVEDUNIT_molecule__milliliter;
  VmCalprotectin = 414 MWBUILTINPREFIX_milli_MWBUILTINUNIT_gram;
  k5_37 = 0.0112 MWDERIVEDUNIT_picomole__milliliter;
  kdeg_CRP = 0.618 MWDERIVEDUNIT_1__day;
  kbasal_Neu = 7935430 MWDERIVEDUNIT_molecule__milliliter_day;
  kdeg_Neu = 3.3 MWDERIVEDUNIT_1__day;
  kIL12_bloodtogut = 0 MWDERIVEDUNIT_1__day;
  kIL12_guttoblood = 0.055 MWDERIVEDUNIT_1__day;
  kIL17_bloodtogut = 0 MWDERIVEDUNIT_1__day;
  kIL17_tissuetoblood = 1.31 MWDERIVEDUNIT_1__day;
  kIL8_bloodtogut = 0 MWDERIVEDUNIT_1__hour;
  kIL8_guttoblood = 0.057 MWDERIVEDUNIT_1__hour;
  kTGFb_bloodtogut = 0 MWDERIVEDUNIT_1__day;
  kTGFb_guttoblood = 0.88 MWDERIVEDUNIT_1__day;
  k1_115 = 0.087 MWDERIVEDUNIT_picomole__milliliter;
  k2_115 = 0.051 MWDERIVEDUNIT_picomole__milliliter;
  kbasal_94 = 0.012 dimensionless;
  k3_115 = 0.0047 MWDERIVEDUNIT_picomole__milliliter;
  vf_94 = 0.4 MWDERIVEDUNIT_1__day;
  k2_94 = 0.000563 MWDERIVEDUNIT_picomole__milliliter;
  kbasal_CRP = 0.469 MWDERIVEDUNIT_picomole__milliliter_day;
  kCRP_LivertoBlood = 0.884406 MWDERIVEDUNIT_1__day;
  kCRP_BloodtoLiver = 0.909 MWDERIVEDUNIT_1__day;
  kCRPSecretion = 0.475 MWDERIVEDUNIT_1__day;
  kIL6_livertoblood = 0.693 MWDERIVEDUNIT_1__day;
  kIL6_guttoblood = 0.009 MWDERIVEDUNIT_1__hour;
  kIL6_bloodtogut = 0 MWDERIVEDUNIT_1__hour;
  kIL6_bloodtoliver = 20.3 MWDERIVEDUNIT_1__day;
  kbasal_IL8_b = 0.003168 MWDERIVEDUNIT_picomole__milliliter__day;
  kTNFa_guttoblood = 0.0455 MWDERIVEDUNIT_1__hour;
  kTNFa_bloodtogut = 0 MWDERIVEDUNIT_1__hour;
  kbasal_TNFa_b = 0.00577 MWDERIVEDUNIT_picomole__milliliter__day;
  kbasal_IL6_b = 0.008 dimensionless;
  kbasal_TGFb_b = 0.1655 MWDERIVEDUNIT_picomole__milliliter__day;
  kbasal_IL12_b = 0.000286 MWDERIVEDUNIT_picomole__milliliter__day;
  kbasal_IL17_b = 0.002335 MWDERIVEDUNIT_picomole__milliliter__day;
  kbasal_115 = 0.1 dimensionless;
  vf_115 = 0.9433 MWDERIVEDUNIT_1__day;
  k4_115 = 0.037 MWDERIVEDUNIT_picomole__milliliter;
  k1_77 = 0.01 MWDERIVEDUNIT_picomole__milliliter;
  k2_77 = 0.000821 MWDERIVEDUNIT_picomole__milliliter;
  kmax_IL6_b = 0.0232 MWDERIVEDUNIT_picomole__milliliter__day;
  k1_94 = 0.086 MWDERIVEDUNIT_picomole__milliliter;
  k_IL6_neu = 0.000914 MWDERIVEDUNIT_picomole__milliliter;
  Imax_Neu_deg = 0.5 dimensionless;
  kdeg_iDC = 0.019 MWDERIVEDUNIT_1__day;
  kneu_guttoblood = 0.185 MWDERIVEDUNIT_1__day;
  k3_51 = 5.14e-5 MWDERIVEDUNIT_picomole__milliliter;
  k6_85 = 0.00648 MWDERIVEDUNIT_picomole__milliliter;
  k2_74 = 2.7e-7;
  k3_74 = 0.003725 MWDERIVEDUNIT_picomole__milliliter;
  k6_37 = 0.01 MWDERIVEDUNIT_picomole__milliliter;
  k7_85 = 0.000875 MWDERIVEDUNIT_picomole__milliliter;
  k7_37 = 0.00126 MWDERIVEDUNIT_picomole__milliliter;
  k3_41 = 0.000808 MWDERIVEDUNIT_picomole__milliliter;
  k_IL17_Th17 = 0.125 dimensionless;
  k_IL22_Th17 = 0.108 dimensionless;
  k4_33 = 0.001285 MWDERIVEDUNIT_picomole__milliliter;
  k_IFNg_NK1 = 0.0858 dimensionless;
  k_IL21_Th17 = 0.16 dimensionless;
  k_GMCSF_IL23 = 0.075 dimensionless;
  k4_51 = 5.94e-5 MWDERIVEDUNIT_picomole__milliliter;
  k_IL17_NKT = 0.097 dimensionless;
  gamma_IL8 = 0.008716 dimensionless;
  k1_114 = 19282 MWDERIVEDUNIT_molecule__milliliter;
  k2_114 = 173591 MWDERIVEDUNIT_molecule__milliliter;
  k3_114 = 255758 MWDERIVEDUNIT_molecule__milliliter;
  k4_61 = 0.00678 MWDERIVEDUNIT_picomole__milliliter;
  k8_85 = 0.012 MWDERIVEDUNIT_picomole__milliliter;
  k3_83 = 0.011 MWDERIVEDUNIT_picomole__milliliter;
  k4_83 = 0.011 MWDERIVEDUNIT_picomole__milliliter;
  gamma_TNFa = 0.129 dimensionless;
  k_epidam = 0.00025 MWDERIVEDUNIT_picomole__milliliter;
  Epithelial_Damage has dimensionless;
  gamma_TGFb = 0.1 dimensionless;
  k1_107 = 100000 MWDERIVEDUNIT_molecule__milliliter;
  k2_107 = 100000 MWDERIVEDUNIT_molecule__milliliter;
  k3_107 = 150000 MWDERIVEDUNIT_molecule__milliliter;
  k4_107 = 150000 MWDERIVEDUNIT_molecule__milliliter;
  gamma_IL12 = 0.1 dimensionless;
  k1_104 = 150000 MWDERIVEDUNIT_molecule__milliliter;
  k2_104 = 150000 MWDERIVEDUNIT_molecule__milliliter;
  k3_104 = 15000 MWDERIVEDUNIT_molecule__milliliter;
  gamma_IL17 = 1 dimensionless;
  gamma_damage = 10 dimensionless;
  alpha_damage = 0 dimensionless;
  Gut_IL_17_basal has MWBUILTINPREFIX_pico_MWBUILTINUNIT_mole;

  // Assignment rules:
  CRP_Liver := VmProtSynth*Liver*(IL6_Liver^2/((KmProtSyn*Liver)^2 + IL6_Liver^2));
  Calprotectin := VmCalprotectin*Neu_Total/(KmCalprotectin*Gut + Neu_Total);
  Neu_Total := Neu_Gut + Neu_act;
  kdeg_GutNeu := kdeg_Neu*(1 - Imax_Neu_deg*IL6_Gut/(IL6_Gut + k_IL6_neu*Gut));
  Epithelial_Damage := alpha_damage*(1 - IL17_Gut/(IL17_Gut + k_epidam*Gut));
  Gut_IL_17_basal := 0.95*(kbasal_IL17*Gut + k1_51*Th17*k_IL17_Th17 + k2_51*NKT*k_IL17_NKT)/(kdeg_IL17 + kIL17_tissuetoblood);

  // Reactions:
  reaction_01: Th0 => Th1; vf_1*Th0*(IL12_Gut/(IL12_Gut + k1_1*IL4 + k2_1*IL10 + k3_1*TGFb_Gut + k4_1*Gut) + IFNg/(IFNg + k1_1*IL4 + k2_1*IL10 + k3_1*TGFb_Gut + k5_1*Gut) + TL1A/(TL1A + k1_1*IL4 + k2_1*IL10 + k3_1*TGFb_Gut + k6_1*Gut) + kbasal_1);
  reaction_02: Th0 => Th2; vf_2*Th0*(IL4/(IL4 + k1_2*IFNg + k2_2*IL10 + k3_2*TGFb_Gut + k4_2*Gut) + kbasal_2);
  reaction_03: Th0 => Th17; vf_3*Th0*(IL6_Gut/(IL6_Gut + k1_3*IL4 + k2_3*IL2 + k3_3*IFNg + k4_3*Gut) + TGFb_Gut/(TGFb_Gut + k1_3*IL4 + k2_3*IL2 + k3_3*IFNg + k5_3*Gut) + TL1A/(TL1A + k1_3*IL4 + k2_3*IL2 + k3_3*IFNg + k6_3*Gut) + IL23/(IL23 + k1_3*IL4 + k2_3*IL2 + k3_3*IFNg + k7_3*Gut) + IL21/(IL21 + k1_3*IL4 + k2_3*IL2 + k3_3*IFNg + k8_3*Gut) + kbasal_3);
  reaction_04: Th0 => Treg; vf_4*Th0*(IL2/(IL2 + k1_4*IL17_Gut + k2_4*IL23 + k3_4*IL6_Gut + k4_4*Gut) + TGFb_Gut/(TGFb_Gut + k1_4*IL17_Gut + k2_4*IL23 + k3_4*IL6_Gut + k5_4*Gut) + kbasal_4 + tDC/(k6_4*Gut + tDC));
  reaction_05: => Th0; vf_5*(eDC/(eDC + k1_5*Gut) + M1/(M1 + k2_5*Gut) + kbasal_Th0)*Gut*Th0_blood_constant;
  reaction_06: Th0 => ; kdeg_Th0*Th0;
  reaction_07: Th1 => ; kdeg_Th1*Th1;
  reaction_08: Th2 => ; kdeg_Th2*Th2;
  reaction_09: Th17 => ; kdeg_Th17*Th17;
  reaction_10: Treg => ; kdeg_Treg*Treg;
  reaction_11: Th17 => Treg; vf_11*Th17*(kbasal_11 + Treg/(Treg + k1_11*Gut) + tDC/(tDC + k2_11*Gut) + M2/(M2 + k3_11*Gut));
  reaction_12: Treg => Th17; vf_12*Treg*(kbasal_12 + Th17/(Th17 + k1_12*Gut) + eDC/(eDC + k2_12*Gut) + M1/(M1 + k3_12*Gut) + Th1/(Th1 + k4_12*Gut));
  reaction_13: => Th1; kbasal_Th1*Gut;
  reaction_14: => Th2; kbasal_Th2*Gut;
  reaction_15: => Th17; kbasal_Th17*Gut;
  reaction_16: => Treg; kbasal_Treg*Gut;
  reaction_17: => M0; kbasal_M0*Gut + k1_17*eDC + k2_17*(M1 + w_17*M2);
  reaction_18: M0 => M1; vf_18*M0*(1 + gamma_damage*Epithelial_Damage)*(kbasal_18 + eDC/(eDC + k1_18*Gut) + Th1/(Th1 + k2_18*Gut) + Th17/(Th17 + k3_18*Gut) + TNFa_Gut/(TNFa_Gut + IL4*fi12 + k4_18*Gut) + IFNg/(IFNg + IL4*fi12 + k5_18*Gut) + GMCSF/(GMCSF + IL4*fi12 + k6_18*Gut));
  reaction_19: M0 => M2; vf_19*M0*(kbasal_19 + tDC/(tDC + k1_19*Gut) + Treg/(Treg + k2_19*Gut) + IL4/(IL4 + k3_19*Gut) + IL13/(IL13 + k4_19*Gut) + IL10/(IL10 + k5_19*Gut) + TGFb_Gut/(TGFb_Gut + k6_19*Gut));
  reaction_20: M1 => M2; vf_20*M1*(kbasal_20 + tDC/(tDC + k1_20*Gut) + Treg/(Treg + k2_20*Gut) + M2/(M2 + k3_20*Gut) + IL10/(IL10 + k4_20*Gut));
  reaction_21: M2 => M1; vf_21*M2*(kbasal_21 + Th1/(Th1 + k1_21*Gut) + M1/(M1 + k2_21*Gut) + eDC/(eDC + k3_21*Gut) + Th17/(Th17 + k4_21*Gut));
  reaction_22: M0 => ; kdeg_M0*M0;
  reaction_23: M1 => ; kdeg_M1*M1;
  reaction_24: M2 => ; kdeg_M2*M2;
  reaction_25: => iDC; vf_25*(eDC/(eDC + k1_25*Gut) + M1/(M1 + k2_25*Gut) + kbasal_iDC)*Gut*iDC_blood_constant;
  reaction_26: iDC => tDC; vf_26*iDC*(kbasal_26 + IL10/(IL10 + k1_26*Gut));
  reaction_27: iDC => eDC; vf_27*iDC*(1 + gamma_damage*Epithelial_Damage)*(k1_27*Gut/(k1_27*Gut + IL10))*(kbasal_27 + TNFa_Gut/(TNFa_Gut + k2_27*Gut) + IFNg/(IFNg + k3_27*Gut) + IL6_Gut/(IL6_Gut + k4_27*Gut));
  reaction_28: iDC => ; kdeg_iDC*iDC;
  reaction_29: tDC => ; kdeg_tDC*tDC;
  reaction_30: eDC => ; kdeg_eDC*eDC;
  reaction_31: => IL12_Gut; kbasal_IL12*Gut + k1_31*eDC + k2_31*M1 + k3_31*M0;
  reaction_32: IL12_Gut => ; kdeg_IL12*IL12_Gut;
  reaction_33: => IFNg; kbasal_IFNg*Gut + k1_33*eDC + k2_33*Th1 + k3_33*NK1*(k_IFNg_NK1 + IL12_Gut/(IL12_Gut + k4_33*Gut));
  reaction_34: IFNg => ; kdeg_IFNg*IFNg;
  reaction_35: => IL2; kbasal_IL2*Gut + k1_35*eDC + k2_35*Th1;
  reaction_36: IL2 => ; kdeg_IL2*IL2;
  reaction_63: Th0 => Th0 + Th0; vf_63*Th0*(M1/(M1 + k1_63*Gut));
  reaction_37: => IL6_Gut; kbasal_IL6*Gut*(TNFa_Gut/(k5_37*Gut + TNFa_Gut) + IL17_Gut/(k6_37*Gut + IL17_Gut)) + k1_37*eDC + k2_37*Th17*(IL23/(IL23 + k7_37*Gut)) + k3_37*M1 + k4_37*Neu_act;
  reaction_38: IL6_Gut => ; kdeg_IL6*IL6_Gut;
  reaction_39: => IL23; kbasal_IL23*Gut + k1_39*eDC + k2_39*M1 + k3_39*Neu_act;
  reaction_40: IL23 => ; kdeg_IL23*IL23;
  reaction_41: => IL21; kbasal_IL21*Gut + k1_41*Th17*(k_IL21_Th17 + IL23/(IL23 + k3_41*Gut)) + k2_41*NKT;
  reaction_42: IL21 => ; kdeg_IL21*IL21;
  reaction_43: => TGFb_Gut; kbasal_TGFb*Gut + k1_43*Th17 + k2_43*Treg + k3_43*NKT + k4_43*M2;
  reaction_44: TGFb_Gut => ; kdeg_TGFb*TGFb_Gut;
  reaction_45: => IL10; kbasal_IL10*Gut + k1_45*Treg + k2_45*NKT + k3_45*tDC + k4_45*M2*(c72*Gut/(IL10 + ci72*IFNg + c72*Gut)) + k5_45*NK1;
  reaction_46: IL10 => ; kdeg_IL10*IL10;
  reaction_47: => TL1A; kbasal_TL1A*Gut + k1_47*Th1 + k2_47*eDC;
  reaction_48: TL1A => ; kdeg_TL1A*TL1A;
  reaction_49: => IL13; kbasal_IL13*Gut + k1_49*Th2 + k2_49*NKT + k3_49*NK2;
  reaction_50: IL13 => ; kdeg_IL13*IL13;
  reaction_51: => IL17_Gut; kbasal_IL17*Gut + k1_51*Th17*(k_IL17_Th17 + IL23/(IL23 + k3_51*Gut)) + k2_51*NKT*(k_IL17_NKT + IL23/(IL23 + k4_51*Gut));
  reaction_52: IL17_Gut => ; kdeg_IL17*IL17_Gut;
  reaction_53: => IL5; kbasal_IL5*Gut + k1_53*Th2 + k2_53*NKT + k3_k5*NK2;
  reaction_54: IL5 => ; kdeg_IL5*IL5;
  reaction_55: => IL4; kbasal_IL4*Gut + k1_55*Th2 + k2_55*NKT + k3_55*Th0 + k4_55*NK2;
  reaction_56: IL4 => ; kdeg_IL4*IL4;
  reaction_57: => IL15; kbasal_IL15*Gut + k1_57*M2;
  reaction_58: IL15 => ; kdeg_IL15*IL15;
  reaction_59: => IL18; kbasal_IL18*Gut + k1_59*M1 + k2_59*eDC;
  reaction_60: IL18 => ; kdeg_IL18*IL18;
  reaction_61: => TNFa_Gut; kbasal_TNFa*Gut*(gamma_TNFa + IL17_Gut/(k4_61*Gut + IL17_Gut)) + k1_61*M1 + k2_61*M2 + k3_61*Th1;
  reaction_62: TNFa_Gut => ; kdeg_TNFa*TNFa_Gut;
  reaction_64: Th1 => Th1 + Th1; vf_64*Th1*(IL2/(IL2 + k1_64*Gut))*(k2_64*Gut/(Treg + k2_64*Gut));
  reaction_65: Th2 => Th2 + Th2; vf_65*Th2*(IL2/(IL2 + k1_65*Gut))*(k2_65*Gut/(Treg + k2_65*Gut));
  reaction_66: Th17 => Th17 + Th17; vf_66*Th17*(IL2/(IL2 + k1_66*Gut));
  reaction_67: Treg => Treg + Treg; vf_67*Treg*(IL2/(IL2 + k1_67*Gut) + tDC/(tDC + k2_67*Gut) + GMCSF/(GMCSF + k3_67*Gut));
  reaction_68: Th17 => Th1; vf_68*Th17*(IL12_Gut/(IL12_Gut + k1_68*TGFb_Gut + k2_68*Gut) + kbasal_68);
  reaction_69: Th17 => Th2; vf_69*Th17*(IL4/(IL4 + k1_69*Gut) + kbasal_69);
  reaction_70: Treg => Th1; vf_70*Treg*(IL12_Gut/(IL12_Gut + k1_70*Gut) + kbasal_70);
  reaction_71: => NK; kbasal_NK*Gut;
  reaction_72: NK => NK1; vf_72*NK*(kbasal_72 + IL15/(IL15 + k1_72*Gut));
  reaction_73: NK => NK2; vf_73*NK*(kbasal_73 + IL23/(IL23 + k1_73*Gut));
  reaction_74: => IL22; kbasal_IL22*Gut + k1_74*NK2 + k2_74*Th17*(k_IL22_Th17 + IL23/(IL23 + k3_74*Gut));
  reaction_75: IL22 => ; kdeg_IL22*IL22;
  reaction_76: => NKT; vf_76*(IL12_Gut/(IL12_Gut + k1_76*Gut) + IL18/(IL18 + k2_76*Gut) + eDC/(eDC + k3_76*Gut) + kbasal_NKT)*Gut*NKT_constant;
  reaction_77: => Neu_Blood; kbasal_Neu*Blood*(1 + IL17_Blood/(IL17_Blood + k1_77*Blood) + GMCSF*Blood/Gut/(GMCSF*Blood/Gut + k2_77*Blood));
  reaction_78: NK => ; kdeg_NK*NK;
  reaction_79: NK1 => ; kdeg_NK1*NK1;
  reaction_80: NK2 => ; kdeg_NK2*NK2;
  reaction_81: NKT => ; kdeg_NKT*NKT;
  reaction_82: Neu_Gut => ; kdeg_GutNeu*Neu_Gut;
  reaction_83: => IL8_Gut; kbasal_IL8*Gut*(gamma_IL8 + TNFa_Gut/(k4_83*Gut + TNFa_Gut) + IL17_Gut/(k3_83*Gut + IL17_Gut)) + k1_83*M1 + k2_83*Neu_act;
  reaction_84: IL8_Gut => ; kdeg_IL8*IL8_Gut;
  reaction_85: => GMCSF; kbasal_GMCSF*Gut*(1 + IL17_Gut/(k7_85*Gut + IL17_Gut) + TNFa_Gut/(k8_85*Gut + TNFa_Gut)) + k1_85*Th1 + k2_85*Th2 + k3_85*Th17*(k_GMCSF_IL23 + IL23/(IL23 + k6_85*Gut)) + k4_85*M1 + k5_85*M2;
  reaction_86: GMCSF => ; kdeg_GMCSF*GMCSF;
  reaction_87: IL6_Gut -> IL6_Blood; kIL6_guttoblood*IL6_Gut - kIL6_bloodtogut*IL6_Blood;
  reaction_88: IL6_Blood -> IL6_Liver; kIL6_bloodtoliver*IL6_Blood - kIL6_livertoblood*IL6_Liver;
  reaction_89: $CRP_Liver => CRPExtracellular; kCRPSecretion*CRP_Liver;
  reaction_90: CRP_Blood -> CRPExtracellular; kCRP_BloodtoLiver*CRP_Blood - kCRP_LivertoBlood*CRP_Liver;
  reaction_91: => CRP_Blood; kbasal_CRP*Blood;
  reaction_92: CRP_Blood => ; kdeg_CRP*CRP_Blood;
  reaction_93: CRPExtracellular => ; kdeg_CRP*CRPExtracellular;
  reaction_94: Neu_Blood => Neu_Gut; vf_94*(IL8_Gut/(IL8_Gut + k2_94*Gut) + TNFa_Gut/(TNFa_Gut + k1_94*Gut) + kbasal_94)*Neu_Blood;
  reaction_95: Neu_Blood => ; kdeg_Neu*Neu_Blood;
  reaction_96: IL8_Blood -> IL8_Gut; kIL8_bloodtogut*IL8_Blood - kIL8_guttoblood*IL8_Gut;
  reaction_97: IL8_Blood => ; kdeg_IL8*IL8_Blood;
  reaction_98: => IL8_Blood; kbasal_IL8_b*Blood*(gamma_IL8 + IL17_Blood/(k3_83*Blood + IL17_Blood) + TNFa_Blood/(k4_83*Blood + TNFa_Blood));
  reaction_99: IL17_Blood -> IL17_Gut; kIL17_bloodtogut*IL17_Blood - kIL17_tissuetoblood*IL17_Gut;
  reaction_100: IL17_Blood => ; kdeg_IL17*IL17_Blood;
  reaction_101: => IL17_Blood; kbasal_IL17_b*Blood*(gamma_IL17 + IL23/(IL23 + k3_51*Gut));
  reaction_102: IL12_Blood -> IL12_Gut; kIL12_bloodtogut*IL12_Blood - kIL12_guttoblood*IL12_Gut;
  reaction_103: IL12_Blood => ; kdeg_IL12*IL12_Blood;
  reaction_104: => IL12_Blood; kbasal_IL12_b*Blood*(gamma_IL12 + eDC/(eDC + k1_104*Gut) + M1/(M1 + k2_104*Gut) + M0/(M0 + k3_104*Gut));
  reaction_105: TGFb_Blood -> TGFb_Gut; kTGFb_bloodtogut*TGFb_Blood - kTGFb_guttoblood*TGFb_Gut;
  reaction_106: TGFb_Blood => ; kdeg_TGFb*TGFb_Blood;
  reaction_107: => TGFb_Blood; kbasal_TGFb_b*Blood*(gamma_TGFb + Th17/(Th17 + k1_107*Gut) + Treg/(Treg + k2_107*Gut) + NKT/(NKT + k3_107*Gut) + M2/(M2 + k4_107*Gut));
  reaction_108: IL6_Blood => ; kdeg_IL6*IL6_Blood;
  reaction_109: IL6_Liver => ; kdeg_IL6*IL6_Liver;
  reaction_110: Neu_Gut => Neu_Blood; kneu_guttoblood*Neu_Gut;
  reaction_111: => IL6_Blood; kmax_IL6_b*Blood*(TNFa_Blood/(k5_37*Blood + TNFa_Blood) + IL17_Blood/(k6_37*Blood + IL17_Blood) + kbasal_IL6_b);
  reaction_112: TNFa_Blood -> TNFa_Gut; kTNFa_bloodtogut*TNFa_Blood - kTNFa_guttoblood*TNFa_Gut;
  reaction_113: TNFa_Blood => ; kdeg_TNFa*TNFa_Blood;
  reaction_114: => TNFa_Blood; kbasal_TNFa_b*Blood*(gamma_TNFa + IL17_Blood/(k4_61*Blood + IL17_Blood) + M1/(k1_114*Gut + M1) + M2/(k2_114*Gut + M2) + Th1/(k3_114*Gut + Th1));
  reaction_115: Neu_Gut => Neu_act; vf_115*Neu_Gut*(IFNg/(IFNg + k1_115*Gut) + TNFa_Gut/(TNFa_Gut + k2_115*Gut) + GMCSF/(GMCSF + k3_115*Gut) + IL8_Gut/(IL8_Gut + k4_115*Gut) + kbasal_115);
  reaction_116: Neu_act => ; kdeg_GutNeu*Neu_act;

  // Events:
  event_505: at (IL17_Gut < Gut_IL_17_basal): alpha_damage = 1;
  event_506: at (IL17_Gut >= Gut_IL_17_basal): alpha_damage = 0;

  // Unit definitions:
  unit MWBUILTINPREFIX_milli_MWBUILTINUNIT_liter = metre^3 * 1e-6 dimensionless; MWBUILTINPREFIX_milli_MWBUILTINUNIT_liter is "milliliter";
  unit MWBUILTINUNIT_molecule = 1.660539e-24 mole;
  unit MWBUILTINPREFIX_pico_MWBUILTINUNIT_mole = 1e-12 mole; MWBUILTINPREFIX_pico_MWBUILTINUNIT_mole is "picomole";
  unit MWBUILTINPREFIX_milli_MWBUILTINUNIT_gram = 1e-3 gram; MWBUILTINPREFIX_milli_MWBUILTINUNIT_gram is "milligram";
  unit MWDERIVEDUNIT_picomole__milliliter = mole * 1e-6 dimensionless / metre^3; MWDERIVEDUNIT_picomole__milliliter is "picomole/milliliter";
  unit MWDERIVEDUNIT_1__day = 1.157407e-5 dimensionless / second; MWDERIVEDUNIT_1__day is "1/day";
  unit MWDERIVEDUNIT_molecule__milliliter = mole * 1.660539e-18 dimensionless / metre^3; MWDERIVEDUNIT_molecule__milliliter is "molecule/milliliter";
  unit MWDERIVEDUNIT_1__milliliter__day = 11.57407 dimensionless / (metre^3 * second); MWDERIVEDUNIT_1__milliliter__day is "1/milliliter/day";
  unit MWDERIVEDUNIT_molecule__milliliter__day = mole * 1.92192e-23 dimensionless / (metre^3 * second); MWDERIVEDUNIT_molecule__milliliter__day is "(molecule/milliliter)/day";
  unit MWDERIVEDUNIT_picomole__molecule__day = 6970072 dimensionless / second; MWDERIVEDUNIT_picomole__molecule__day is "(picomole/molecule)/day";
  unit MWDERIVEDUNIT_picomole__milliliter__day = mole * 1.157407e-11 dimensionless / (metre^3 * second); MWDERIVEDUNIT_picomole__milliliter__day is "(picomole/milliliter)/day";
  unit (picomole /molecule)/day = 6970072 dimensionless / second;
  unit MWDERIVEDUNIT_1__milliliter__day = 11.57407 dimensionless / (metre^3 * second); MWDERIVEDUNIT_1__milliliter__day is "(1/milliliter)/day";
  unit MWDERIVEDUNIT_picomole__molecule__day = 6970072 dimensionless / second; MWDERIVEDUNIT_picomole__molecule__day is "(picomole/(molecule))/day";
  unit MWDERIVEDUNIT_molecule__milliliter_day = mole * 1.92192e-23 dimensionless / (metre^3 * second); MWDERIVEDUNIT_molecule__milliliter_day is "molecule/(milliliter*day)";
  unit MWDERIVEDUNIT_1__hour = 2.777778e-4 dimensionless / second; MWDERIVEDUNIT_1__hour is "1/hour";
  unit MWDERIVEDUNIT_picomole__milliliter_day = mole * 1.157407e-11 dimensionless / (metre^3 * second); MWDERIVEDUNIT_picomole__milliliter_day is "picomole/(milliliter*day)";
end
